<?xml version="1.0"?>
<!-- **********************************************************************
AERODYNAMICS
***************************************************************************-->
<aerodynamics>
	<!-- References
		1. Digital Datcom  https://www.pdas.com/datcom.html , http://www.holycows.net/datcom/
		2. OpenVSP  https://openvsp.org/
		3. ARA paper C.P. No. 1199 - A Simulator Study of Direct Lift Control 1972.
			A.G.Barnes, D.E.A. Houghton, C. Colclough. Flight Simulator Dept, BAC Warton
			 https://reports.aerade.cranfield.ac.uk/handle/1826.2/1212
		4. Test Pilot - Brian Trubshaw 1998, via http://www.vc10.net/Technical/wing_shapes.html fig 2 and fig 3.
		5. VC10 Type 1106 model drawing A.A.P.Lloyd (Scale 1:192) May 1968 Aeromodeller.
		6. VC10 C Mk1 Pilots Notes - Technical. AP 101B-0201-15A  May 1967.
	-->
	<!-- Reference 5 was used as the basis for the Digital Datcom and OpenVSP aero analysis, and for the 3d model VC10.ac. 	-->
	<!-- An aerodynamic reference point of 79.07 ft (948.9") aft of the manufacturer´s fuselage datum has been used. This equates to 32% SMC.  Roll, pitch and yaw moments are calculated about the aerodynamic reference point. -->
	<!-- The fuselage datum is that defined by Vickers and is 8" aft of the front of the radome.
    and is used for placing and animating objects in the top level model files.
	(VC10_model.xml and VC10.ac).	-->

	<function name="inertia/cg-x-percent">
		<description>cg, percentage of cbar</description>
		<quotient>
			<difference>
				<property>inertia/cg-x-in</property><!-- aircraft cg position -->
				<value>872.0</value>
				<!-- SMC LE is 872 inches (72'8") aft of fuselage datum-->
			</difference>
			<value>2.402</value>
			<!-- SMC is 240.2 inches, divide by (240.2/100) to get %chord -->
		</quotient>
	</function>

	<function name="inertia/cg-x-datum-in">
		<description>cg , percentage of cbar</description>
			<difference>
				<property>inertia/cg-x-in</property>
				<value>948.0</value><!-- Trim datum is 948 inches aft of fuselage datum-->
			</difference>
	</function>

	<axis name="LIFT">
		<!-- ########################################################### -->
		<function name="aero/force/Lift_alpha">
			<description>Lift_due_to_alpha</description>
			<product>
				<property>aero/qbar-psf</property>
				<property>metrics/Sw-sqft</property>
				<table name="aero/coefficient/CL_alpha">
					<!-- Datcom using Peakey wing section -->
					<independentVar lookup="row">aero/alpha-deg</independentVar>
					<independentVar lookup="column">velocities/mach</independentVar>
					<tableData>
						0.1	0.2	0.3	0.4	0.5	0.6
					-10	-0.622	-0.626	-0.629	-0.635	-0.646	-0.661
					-8	-0.430	-0.433	-0.436	-0.441	-0.449	-0.461
					-6	-0.239	-0.241	-0.243	-0.246	-0.251	-0.258
					-4	-0.051	-0.051	-0.051	-0.052	-0.053	-0.054
					-2	0.138	0.139	0.140	0.143	0.146	0.151
					0	0.330	0.332	0.334	0.338	0.345	0.354
					2	0.523	0.526	0.528	0.533	0.542	0.556
					4	0.717	0.721	0.722	0.728	0.738	0.755
					6	0.915	0.919	0.918	0.924	0.934	0.954
					8	1.113	1.118	1.110	1.107	1.111	1.126
					10	1.275	1.279	1.259	1.248	1.245	1.256
					12	1.398	1.400	1.368	1.349	1.339	1.344
					14	1.480	1.480	1.435	1.405	1.384	1.394
					16	1.517	1.515	1.480	1.465	1.465	1.468
					18	1.571	1.574	1.507	1.467	1.451	1.464
					20	1.498	1.499	1.435	1.425	1.435	1.472
					22	1.401	1.410	1.389	1.398	1.438	1.498
					24	1.325	1.344	1.367	1.404	1.455	1.527
					</tableData>
				</table>
			</product>
		</function>
		<function name="aero/force/Lift_flap">
			<description>Lift_due_to_flaps</description>
			<product>
				<property>aero/qbar-psf</property>
				<property>metrics/Sw-sqft</property>
				<table name="aero/coefficient/CL_Flap">
					<independentVar>fcs/flap-pos-deg</independentVar>
					<!-- from  CP 1199
					<tableData>
						0	0
						45	1.05
					</tableData> -->
					<!--  Datcom values -->
					<tableData>
						0	0
						20	0.483
						35	0.7241
						45	0.791
					</tableData>
				</table>
			</product>
		</function>
		<function name="aero/force/Lift_q">
			<description>
				Lift due to pitch rate
			</description>
			<product>
				<property>velocities/q-aero-rad_sec</property>
				<property>aero/qbar-psf</property>
				<property>metrics/Sw-sqft</property>
				<property>aero/ci2vel</property>
				<table name="aero/derivative/CLq">
					<independentVar lookup="row">velocities/mach</independentVar>
					<tableData>
						0.1	8.5640
						0.2	8.6080
						0.3	8.6710
						0.4	8.7270
						0.5	8.9410
						0.6	9.1220
					</tableData>
				</table>
			</product>
		</function>
		<function name="aero/force/Lift_alphadot">
			<description>
				Lift due to AOA rate
			</description>
			<product>
				<property>aero/alphadot-rad_sec</property>
				<property>aero/qbar-psf</property>
				<property>metrics/Sw-sqft</property>
				<property>aero/ci2vel</property>
				<table name="aero/derivative/CLad">
					<!--Datcom -->
					<independentVar lookup="row">velocities/mach</independentVar>
					<tableData>
						0.1	1.373
						0.2	1.378
						0.3	1.379
						0.4	1.371
						0.5	1.401
						0.6	1.408
					</tableData>
				</table>
			</product>
		</function>
		<function name="aero/force/Lift_elevator">
			<description>
				Lift due to Elevator Deflection
				Positive surface deflection is trailing edge down
			</description>
			<product>
				<property>aero/qbar-psf</property>
				<property>metrics/Sw-sqft</property>
				<table name="aero/coefficient/CL_Elevator">
					<independentVar lookup="row">fcs/elevator-pos-deg</independentVar>
					<independentVar lookup="column">velocities/mach</independentVar>
					<tableData>
						0.0	0.2	0.3	0.4	0.5	0.6
					-30	-0.137	-0.137	-0.135	-0.131	-0.126	-0.117
					-25	-0.125	-0.126	-0.124	-0.12	-0.115	-0.107
					-20	-0.12	-0.12	-0.118	-0.115	-0.11	-0.103
					-10	-0.073	-0.073	-0.072	-0.07	-0.067	-0.063
					0		0		0		0		0		0		0
					5	0.037	0.037	0.036	0.035	0.034	0.031
					10	0.073	0.073	0.072	0.07	0.067	0.063
					15	0.107	0.107	0.106	0.103	0.098	0.092
					20	0.12	0.12	0.118	0.115	0.11	0.103
					</tableData>
				</table>
			</product>
		</function>
		<function name="aero/force/Lift_TailTrim">
			<description>
				Lift due to Tail Trim Deflection
				Positive surface deflection is trailing edge down
			</description>
			<product>
				<property>aero/qbar-psf</property>
				<property>metrics/Sw-sqft</property>
				<table name="aero/coefficient/CL_tailplane">
					<independentVar lookup="row">aero/alpha-deg</independentVar>
					<independentVar lookup="column">fcs/pitch-trim-pos-deg</independentVar>
					<tableData>
								-14		-10		-6		-3		0	3
							-10	-0.102	-0.093	-0.063	-0.035	0	0.034
							-8	-0.117	-0.1	-0.067	-0.035	0	0.034
							-6	-0.131	-0.106	-0.069	-0.035	0	0.034
							-4	-0.14	-0.11	-0.069	-0.034	0	0.033
							-2	-0.148	-0.113	-0.069	-0.034	0	0.032
							0	-0.152	-0.113	-0.067	-0.033	0	0.032
							2	-0.155	-0.112	-0.066	-0.032	0	0.032
							4	-0.155	-0.11	-0.064	-0.031	0	0.033
							6	-0.155	-0.108	-0.064	-0.032	0	0.034
							8	-0.152	-0.107	-0.064	-0.032	0	0.034
							10	-0.149	-0.106	-0.064	-0.033	0	0.033
							12	-0.145	-0.103	-0.062	-0.031	0	0.033
							14	-0.143	-0.103	-0.062	-0.031	0	0.032
							16	-0.142	-0.102	-0.061	-0.03	0	0.028
							18	-0.139	-0.099	-0.058	-0.028	0	0.024
							20	-0.134	-0.093	-0.053	-0.023	0	0.021
							22	-0.129	-0.086	-0.046	-0.019	0	0.017
							24	-0.121	-0.077	-0.038	-0.014	0	0.012
					</tableData>
				</table>
			</product>
		</function>
		<function name="aero/force/Lift_speedbrakes">
			<!-- from CP1199 -->
			<description>
				Lift due to speedbrakes
			</description>
			<product>
				<property>aero/qbar-psf</property>
				<property>metrics/Sw-sqft</property>
				<product name="aero/coefficient/CL_speedbrakes">
					<property>fcs/speedbrake-pos-sum-norm</property>
					<sum>
						<value>-0.3</value>
						<product>
							<value>-0.014</value>
							<property>aero/alpha-deg</property>
						</product>
					</sum>
				</product>
			</product>
		</function>
		<function name="aero/force/Lift_ground_effect">
			<description>Lift_due_ground_effect</description>
			<product>
				<property>aero/qbar-psf</property>
				<property>metrics/Sw-sqft</property>
				<table name="aero/coefficient/CL_ground_effect">
					<independentVar lookup="row">aero/alpha-deg</independentVar>
					<independentVar lookup="column">position/h-agl-ft</independentVar>
					<tableData>
						5.0	10.0	20.0	30.0	40.0	50.0	100.0
						-10	-0.4960	-0.3430	-0.1370	-0.0570	-0.0290	-0.0150	0.0000
						-6	-0.2890	-0.2000	-0.0800	-0.0330	-0.0170	-0.0090	0.0000
						-4	-0.0820	-0.0570	-0.0230	-0.0100	-0.0050	-0.0030	0.0000
						-2	0.0780	0.0560	0.0250	0.0110	0.0060	0.0030	0.0000
						0	0.1860	0.1360	0.0620	0.0270	0.0140	0.0080	0.0000
						2	0.2580	0.1910	0.0920	0.0410	0.0210	0.0120	0.0000
						4	0.3010	0.2220	0.1120	0.0500	0.0250	0.0140	0.0000
						6	0.3220	0.2350	0.1230	0.0550	0.0270	0.0150	0.0000
						8	0.3030	0.2240	0.1230	0.0540	0.0250	0.0130	0.0000
						10	0.2390	0.1790	0.1000	0.0430	0.0180	0.0080	0.0000
						12	0.1630	0.1220	0.0670	0.0270	0.0100	0.0030	0.0000
						14	0.0900	0.0720	0.0390	0.0150	0.0040	0.0000	0.0000
						16	0.0220	0.0250	0.0160	0.0060	0.0020	0.0000	0.0000
					</tableData>
				</table>
			</product>
		</function>
	</axis>
	<axis name="DRAG">
		<!-- ########################################################### -->
		<function name="aero/force/Drag_alpha">
			<description>Drag_due_to_alpha</description>
			<product>
				<property>aero/qbar-psf</property>
				<property>metrics/Sw-sqft</property>
				<table name="aero/coefficient/CD_alpha">
					<!-- using Peakey wing section -->
					<independentVar lookup="row">aero/alpha-deg</independentVar>
					<independentVar lookup="column">velocities/mach</independentVar>
					<tableData>
						0.1	0.2	0.3	0.4	0.5	0.6
					-10	0.1260	0.1250	0.1240	0.1240	0.1240	0.1250
					-8	0.0760	0.0750	0.0750	0.0750	0.0750	0.0750
					-6	0.0360	0.0350	0.0350	0.0350	0.0350	0.0350
					-4	0.0190	0.0180	0.0180	0.0180	0.0180	0.0180
					-2	0.0140	0.0130	0.0130	0.0120	0.0120	0.0120
					0	0.0120	0.0120	0.0110	0.0110	0.0110	0.0110
					2	0.0130	0.0130	0.0120	0.0120	0.0120	0.0120
					4	0.0190	0.0180	0.0180	0.0180	0.0180	0.0180
					6	0.0350	0.0350	0.0340	0.0340	0.0340	0.0340
					8	0.0750	0.0740	0.0740	0.0740	0.0740	0.0740
					10	0.1250	0.1240	0.1230	0.1230	0.1230	0.1240
					12	0.1900	0.1890	0.1890	0.1890	0.1890	0.1890
					14	0.2370	0.2360	0.2360	0.2360	0.2360	0.2360
					16	0.3040	0.3020	0.3020	0.3020	0.3020	0.3030
					18	0.3520	0.3500	0.3500	0.3500	0.3500	0.3500
					</tableData>
				</table>
			</product>
		</function>
		<function name="aero/force/Drag_flap">
			<description>Drag_due_to_flaps</description>
			<product>
				<property>aero/qbar-psf</property>
				<property>metrics/Sw-sqft</property>
				<sum>
					<table name="aero/coefficient/CD0_Flaps">
						<independentVar>aero/alpha-deg</independentVar>
						<tableData>
						0	0
						20	0.01566
						35	0.0517
						45	0.07822
						</tableData>
					</table>
					<table name="aero/coefficient/CDI_Flaps">
						<independentVar lookup="row">aero/alpha-deg</independentVar>
						<independentVar lookup="column">fcs/flap-pos-deg</independentVar>
						<tableData>
						      0	      20	  35	  45
						-10	0.0000	-0.0163	-0.0142	-0.0128
						-8	0.0000	-0.0093	-0.0034	-0.0013
						-6	0.0000	-0.0023	0.0073	0.0102
						-4	0.0000	0.0047	0.0181	0.0217
						-2	0.0000	0.0117	0.0288	0.0332
						0	0.0000	0.0187	0.0396	0.0447
						2	0.0000	0.0257	0.0503	0.0562
						4	0.0000	0.0327	0.0611	0.0677
						6	0.0000	0.0397	0.0718	0.0792
						8	0.0000	0.0467	0.0826	0.0908
						10	0.0000	0.0537	0.0933	0.1020
						12	0.0000	0.0607	0.1040	0.1140
						14	0.0000	0.0677	0.1150	0.1250
						16	0.0000	0.0747	0.1260	0.1370
						18	0.0000	0.0817	0.1360	0.1480
						20	0.0000	0.0887	0.1470	0.1600
						22	0.0000	0.0957	0.1580	0.1710
						24	0.0000	0.1030	0.1690	0.1830
						</tableData>
					</table>
				</sum>
			</product>
		</function>
		<function name="aero/force/Drag_gear">
			<description>Drag_due_to_gear</description>
			<product>
				<property>aero/qbar-psf</property>
				<property>metrics/Sw-sqft</property>
				<property>gear/gear-pos-norm</property>
				<value>0.011</value>
			</product>
		</function>
		<!--		<function name="aero/force/Drag_Elevator">
			<description>Drag_due_to_Elevator_Deflection</description>
			<product>
				<property>aero/qbar-psf</property>
				<property>metrics/Sw-sqft</property>
				<table name="aero/coefficient/CD_Elevator">
					<independentVar lookup="row">aero/alpha-deg</independentVar>
					<independentVar lookup="column">fcs/elevator-pos-deg</independentVar>
					<tableData>
						-30			-25			-20			-15			-10			-5			0	5			10			15		20
					-10	0.01888		0.01549		0.01181		0.0081		0.0047		0.00191		0	-0.00088	-0.00068	0.00051	0.00246
					-8	0.01733		0.01404		0.01052		0.00705		0.00394		0.00151		0	-0.00045	0.00017		0.00175	0.00405
					-6	0.01566		0.0125		0.00916		0.00594		0.00315		0.00109		0	-0.00003	0.00101		0.00298	0.00562
					-4	0.01389		0.01088		0.00774		0.00479		0.00233		0.00067		0	0.00041		0.00187		0.00422	0.00719
					-2	0.01198		0.00915		0.00624		0.00358		0.00149		0.00023		0	0.00085		0.00273		0.00546	0.00874
					0	0.00996		0.00731		0.00465		0.00233		0.00061		-0.00021	0	0.0013		0.0036		0.00671	0.0103
					2	0.0078		0.00536		0.00299		0.00101		-0.0003		-0.00068	0	0.00176		0.00448		0.00796	0.01186
					4	0.00552		0.00332		0.00126		-0.00036	-0.00123	-0.00116	0	0.00222		0.00536		0.00918	0.01339
					6	0.0031		0.00117		-0.00056	-0.00177	-0.00221	-0.00164	0	0.00268		0.00625		0.0104	0.0149
					8	0.00058		-0.00107	-0.00244	-0.00325	-0.00321	-0.00214	0	0.00315		0.00715		0.01163	0.01639
					10	-0.00203	-0.00338	-0.0044		-0.00474	-0.0042		-0.00264	0	0.00361		0.00802		0.01281	0.01787
					12	-0.00485	-0.00588	-0.00646	-0.00632	-0.00526	-0.00316	0	0.0041		0.00892		0.01409	0.01937
					14	-0.00782	-0.00845	-0.00858	-0.00794	-0.00634	-0.00369	0	0.0046		0.00984		0.0153	0.02081
					16	-0.01092	-0.01114	-0.01079	-0.00962	-0.00745	-0.00423	0	0.00508		0.01074		0.01644	0.02218
					</tableData>
				</table>
			</product>
		</function> -->
		<function name="aero/force/Drag_TailTrim">
			<description>
				Drag due to Tail Trim Deflection
				Positive surface deflection is trailing edge down
			</description>
			<product>
				<property>aero/qbar-psf</property>
				<property>metrics/Sw-sqft</property>
				<table name="aero/coefficient/CD_tailplane">
					<independentVar lookup="row">aero/alpha-deg</independentVar>
					<independentVar lookup="column">fcs/pitch-trim-pos-deg</independentVar>
					<tableData>
							-14		-10		-6		-3		0		3
						-10	0.019	0.017	0.011	0.006	0	-0.004
						-8	0.019	0.015	0.009	0.004	0	-0.004
						-6	0.019	0.014	0.008	0.003	0	-0.002
						-4	0.018	0.013	0.007	0.003	0	-0.001
						-2	0.015	0.01	0.004	0.001	0	-0.001
						0	0.013	0.008	0.003	0.001	0	0.001
						2	0.009	0.004	0.001	0		0	0.002
						4	0.005	0.001	-0.002	-0.002	0	0.002
						6	0.001	-0.002	-0.003	-0.002	0	0.004
						8	-0.004	-0.006	-0.005	-0.003	0	0.004
						10	-0.008	-0.008	-0.007	-0.004	0	0.006
						12	-0.013	-0.012	-0.009	-0.006	0	0.006
						14	-0.017	-0.015	-0.011	-0.006	0	0.008
						16	-0.022	-0.019	-0.013	-0.008	0	0.007
						18	-0.026	-0.022	-0.015	-0.008	0	0.007
					</tableData>
				</table>
			</product>
		</function>
		<function name="aero/force/Drag_speedbrakes">
			<!-- from CP1199 -->
			<description>
				Drag due to speedbrakes
			</description>
			<product>
				<property>aero/qbar-psf</property>
				<property>metrics/Sw-sqft</property>
				<product name="aero/coefficient/CD_speedbrakes">
					<property>fcs/speedbrake-pos-sum-norm</property>
					<sum>
						<value>0.0268</value>
						<product>
							<value>0.0165</value>
							<property>aero/coefficient/CL_alpha</property>
							<property>aero/coefficient/CL_alpha</property>
						</product>
					</sum>
				</product>
			</product>
		</function>
		<function name="aero/force/Drag_ground_effect">
			<description>Drag_due_ground_effect</description>
			<product>
				<property>aero/qbar-psf</property>
				<property>metrics/Sw-sqft</property>
				<table name="aero/coefficient/CD_ground_effect">
					<independentVar lookup="row">aero/alpha-deg</independentVar>
					<independentVar lookup="column">position/h-agl-ft</independentVar>
					<tableData>
						5.0	10.0	20.0	30.0	40.0	50.0	100.0
						-10	-0.0030	-0.0020	-0.0020	-0.0010	-0.0010	0.0000	0.0000
						-6	-0.0010	0.0000	0.0000	0.0000	0.0000	0.0000	0.0000
						-4	0.0000	0.0000	0.0000	0.0000	0.0000	0.0000	0.0000
						-2	-0.0010	-0.0010	0.0000	0.0000	0.0000	0.0000	0.0000
						0	-0.0030	-0.0020	-0.0010	-0.0010	0.0000	0.0000	0.0000
						2	-0.0080	-0.0060	-0.0040	-0.0030	-0.0020	-0.0010	0.0000
						4	-0.0130	-0.0100	-0.0060	-0.0040	-0.0030	-0.0020	0.0000
						6	-0.0220	-0.0170	-0.0110	-0.0070	-0.0050	-0.0030	0.0000
						8	-0.0340	-0.0270	-0.0170	-0.0110	-0.0080	-0.0050	0.0000
						10	-0.0470	-0.0370	-0.0230	-0.0150	-0.0100	-0.0070	0.0000
						12	-0.0610	-0.0480	-0.0300	-0.0200	-0.0140	-0.0090	0.0000
						14	-0.0690	-0.0550	-0.0340	-0.0220	-0.0150	-0.0100	0.0000
						16	-0.0770	-0.0610	-0.0380	-0.0250	-0.0170	-0.0120	0.0000
					</tableData>
				</table>
			</product>
		</function>
	</axis>
	<axis name="PITCH">
		<!-- ########################################################### -->
		<function name="aero/moment/Pitch_alpha">
			<description>Pitch_moment_due_to_alpha</description>
			<product>
				<property>aero/qbar-psf</property>
				<property>metrics/Sw-sqft</property>
				<property>metrics/cbarw-ft</property>
				<table name="aero/coefficient/CM_Alpha">
					<!-- using Peakey wing section  -->
					<independentVar lookup="row">aero/alpha-deg</independentVar>
					<independentVar lookup="column">velocities/mach</independentVar>-->
					<tableData>
						0.1	0.2	0.3	0.4	0.5	0.6
					-10	0.2996	0.2997	0.3015	0.3051	0.3107	0.3176
					-8	0.2527	0.2530	0.2547	0.2577	0.2624	0.2683
					-6	0.2031	0.2035	0.2049	0.2073	0.2110	0.2155
					-4	0.1522	0.1525	0.1535	0.1552	0.1576	0.1608
					-2	0.1027	0.1029	0.1034	0.1042	0.1055	0.1070
					0	0.0543	0.0542	0.0542	0.0542	0.0542	0.0541
					2	0.0068	0.0063	0.0058	0.0050	0.0037	0.0019
					4	-0.0404	-0.0412	-0.0421	-0.0438	-0.0462	-0.0497
					6	-0.0863	-0.0875	-0.0888	-0.0913	-0.0949	-0.0999
					8	-0.1290	-0.1305	-0.1320	-0.1347	-0.1390	-0.1450
					10	-0.1655	-0.1672	-0.1685	-0.1715	-0.1764	-0.1833
					12	-0.1973	-0.1991	-0.2003	-0.2035	-0.2089	-0.2164
					14	-0.2253	-0.2271	-0.2283	-0.2315	-0.2372	-0.2456
					16	-0.2533	-0.2551	-0.2563	-0.2595	-0.2655	-0.2748
					18	-0.2813	-0.2831	-0.2843	-0.2875	-0.2938	-0.3040
					</tableData>
				</table>
			</product>
		</function>
		<function name="aero/moment/Pitch_pitch_rate">
			<description>Pitch_moment_due_to_pitch_rate</description>
			<product>
				<property>aero/qbar-psf</property>
				<property>metrics/Sw-sqft</property>
				<property>metrics/cbarw-ft</property>
				<property>aero/ci2vel</property>
				<property>velocities/q-aero-rad_sec</property>
				<table name="aero/derivative/CMq">
					<independentVar lookup="row">velocities/mach</independentVar>
					<tableData>
					0.1	-17.0600
					0.2	-17.1000
					0.3	-17.1900
					0.4	-17.1400
					0.5	-17.5400
					0.6	-17.7000
					</tableData>
				</table>
			</product>
		</function>
		<function name="aero/moment/Pitch_alpha_rate">
			<description>Pitch_moment_due_to_alpha_rate</description>
			<product>
				<property>aero/qbarUW-psf</property>
				<property>metrics/Sw-sqft</property>
				<property>metrics/cbarw-ft</property>
				<property>aero/ci2vel</property>
				<property>aero/alphadot-rad_sec</property>
				<table name="aero/derivative/CMadot">
					<independentVar lookup="row">velocities/mach</independentVar>
					<tableData>
						<!--Datcom -->
						0.1	-4.250
						0.2	-4.261
						0.3	-4.268
						0.4	-4.239
						0.5	-4.336
						0.6	-4.357
					</tableData>
				</table>
			</product>
		</function>
		<function name="aero/moment/Pitch_flap">
			<description>Pitch_moment_due_to_flaps</description>
			<product>
				<property>aero/qbar-psf</property>
				<property>metrics/Sw-sqft</property>
				<property>metrics/cbarw-ft</property>
				<table name="aero/coefficient/CM_Flap">
					<independentVar>fcs/flap-pos-deg</independentVar>
					<!-- from CP 1199
					<tableData>
						0	0
						45	-0.3
					</tableData> -->
					<!-- Datcom -->
					<tableData>
						0	0
						20	-0.2226
						35	-0.3504
						45	-0.3844
					</tableData>
				</table>
			</product>
		</function>
		<function name="aero/moment/Pitch_elevator">
			<description>Pitch_moment_due_to_elevator</description>
			<product>
				<property>aero/qbar-psf</property>
				<property>metrics/Sw-sqft</property>
				<property>metrics/cbarw-ft</property>
				<table name="aero/coefficient/CM_Elevator">
					<independentVar lookup="column">velocities/mach</independentVar>
					<independentVar lookup="row">fcs/elevator-pos-deg</independentVar>
					<tableData>
						0.0	0.2	0.3	0.4	0.5	0.6
					-30	0.3753	0.3763	0.3729	0.3614	0.3414	0.3105
					-25	0.3448	0.3473	0.3441	0.3336	0.3153	0.287
					-20	0.3273	0.3296	0.3266	0.3166	0.2991	0.272
					-10	0.1989	0.2003	0.1985	0.1924	0.1817	0.1652
					0	-0.0002	-0.0002	-0.0002	-0.0002	-0.0002	-0.0002
					5	-0.0996	-0.1003	-0.0994	-0.0964	-0.091	-0.0828
					10	-0.1989	-0.2003	-0.1985	-0.1924	-0.1817	-0.1652
					15	-0.2908	-0.2928	-0.2901	-0.2811	-0.2655	-0.2413
					20	-0.3273	-0.3296	-0.3266	-0.3166	-0.2991	-0.272
					</tableData>
				</table>
			</product>
		</function>
		<function name="aero/moment/Pitch_tailtrim">
			<description>
				Pitch Moment due to Tail Trim Deflection
				Positive surface deflection is trailing edge down
			</description>
			<product>
				<property>aero/qbar-psf</property>
				<property>metrics/Sw-sqft</property>
				<property>metrics/cbarw-ft</property>
				<table name="aero/coefficient/CM_tailplane">
					<independentVar lookup="row">aero/alpha-deg</independentVar>
					<independentVar lookup="column">fcs/pitch-trim-pos-deg</independentVar>
					<tableData>
							-14		-10		-6		-3		0		3
						-10	0.3209	0.2902	0.1973	0.107	0	-0.1031
						-8	0.3717	0.3162	0.2093	0.1085	0	-0.1037
						-6	0.4149	0.335	0.2161	0.1083	0	-0.103
						-4	0.4463	0.3495	0.2179	0.1067	0	-0.1005
						-2	0.4695	0.3578	0.2143	0.1045	0	-0.0982
						0	0.4858	0.3589	0.2101	0.1021	0	-0.0971
						2	0.4937	0.3544	0.2056	0.0997	0	-0.0984
						4	0.4964	0.3487	0.202	0.0987	0	-0.1014
						6	0.4962	0.345	0.2014	0.1006	0	-0.1038
						8	0.4888	0.3415	0.2013	0.1017	0	-0.1049
						10	0.4793	0.3373	0.2008	0.1016	0	-0.1047
						12	0.4712	0.3339	0.2008	0.1003	0	-0.1031
					</tableData>
				</table>
			</product>
		</function>
		<function name="aero/force/Pitch_speedbrakes">
			<!-- from CP1199 -->
			<description>
				Pitch moment due to speedbrakes
			</description>
			<product>
				<property>aero/qbar-psf</property>
				<property>metrics/Sw-sqft</property>
				<property>metrics/cbarw-ft</property>
				<product name="aero/coefficient/CM_speedbrakes">
					<property>fcs/speedbrake-pos-sum-norm</property>
					<sum>
						<value>-0.0256</value>
						<product>
							<value>0.0246</value>
							<property>aero/coefficient/CL_alpha</property>
						</product>
					</sum>
				</product>
			</product>
		</function>
		<function name="aero/moment/Pitch_ground_effect">
			<description>Pitch Moment_due_ground_effect</description>
			<product>
				<property>aero/qbar-psf</property>
				<property>metrics/Sw-sqft</property>
				<property>metrics/cbarw-ft</property>
				<table name="aero/coefficient/CM_ground_effect">
					<independentVar lookup="row">aero/alpha-deg</independentVar>
					<independentVar lookup="column">position/h-agl-ft</independentVar>
					<tableData>
						5.0	10.0	20.0	30.0	40.0	50.0	100
						-10	-0.0186	-0.0129	-0.0052	-0.0022	-0.0011	-0.0006	0.0000
						-6	-0.0109	-0.0075	-0.0030	-0.0013	-0.0007	-0.0004	0.0000
						-4	-0.0031	-0.0021	-0.0009	-0.0004	-0.0002	-0.0001	0.0000
						-2	0.0029	0.0021	0.0009	0.0004	0.0002	0.0001	0.0000
						0	0.0070	0.0051	0.0024	0.0010	0.0006	0.0003	0.0000
						2	0.0097	0.0072	0.0035	0.0016	0.0008	0.0005	0.0000
						4	0.0113	0.0083	0.0042	0.0019	0.0010	0.0005	0.0000
						6	0.0120	0.0088	0.0046	0.0020	0.0010	0.0005	0.0000
						8	0.0113	0.0084	0.0046	0.0020	0.0009	0.0005	0.0000
						10	0.0089	0.0067	0.0037	0.0016	0.0006	0.0002	0.0000
						12	0.0061	0.0046	0.0025	0.0010	0.0003	0.0001	0.0000
						14	0.0034	0.0027	0.0015	0.0006	0.0002	0.0000	0.0000
						16	0.0008	0.0009	0.0006	0.0002	0.0000	-0.0001	0.0000
					</tableData>
				</table>
			</product>
		</function>
	</axis>

	<axis name="SIDE">
		<!-- ########################################################### -->
		<function name="aero/force/Side_sideslip">
			<description>Side_force_due_to_beta</description>
			<product>
				<property>aero/qbar-psf</property>
				<property>metrics/Sw-sqft</property>
				<property>aero/beta-rad</property>
				<table name="aero/derivative/Cyb">
					<!--<independentVar lookup="row">aero/alpha-deg</independentVar>
					<tableData>
						-10	-0.3194
						-8	-0.3095
						-6	-0.3005
						-4	-0.2993
						-2	-0.2837
						0	-0.2726
						2	-0.2663
						4	-0.2600
						6	-0.2530
						8	-0.2484
						10	-0.2484
						12	-0.2424
						14	-0.2419
						16	-0.2340
					</tableData> -->
					<independentVar lookup="row">velocities/mach</independentVar>
					<tableData>
						0.1	-0.5538
						0.2	-0.5557
						0.3	-0.5588
						0.4	-0.5633
						0.5	-0.5695
						0.6	-0.5775
					</tableData>
				</table>
			</product>
		</function>
		<function name="aero/force/Side_rollrate">
			<description>Side_force_due_to_Roll Rate</description>
			<product>
				<property>aero/qbar-psf</property>
				<property>metrics/Sw-sqft</property>
				<property>aero/bi2vel</property>
				<property>velocities/p-aero-rad_sec</property>
				<table name="aero/derivative/Cyp">
					<independentVar lookup="row">aero/alpha-deg</independentVar>
					<tableData>
						-10	-0.3758
						-8	-0.3049
						-6	-0.2338
						-4	-0.1623
						-2	-0.0903
						0	-0.0195
						2	0.0515
						4	0.1222
						6	0.1925
						8	0.2624
						10	0.3317
						12	0.4012
						14	0.4698
						16	0.5372
					</tableData>
				</table>
			</product>
		</function>
		<!-- CYr is often ignored - it is the side force equivalent to Czq
		<function name="aero/force/Side_yawrate">
			<description>Side_force_due_to_Yaw Rate (per radian)</description>
			<product>
				<property>aero/qbar-psf</property>
				<property>metrics/Sw-sqft</property>
				<property>aero/bi2vel</property>
				<property>velocities/r-aero-rad_sec</property>
				<table name="aero/derivative/Cyr">
					<independentVar lookup="row">aero/alpha-deg</independentVar>
					<tableData>
						-10	0.2712
						0	0.2200
						16	0.2000
					</tableData>
				</table>
			</product>
		</function>
-->
		<!--		<function name="aero/force/Side_spoiler">
			<description>Side_force_due_to_spoiler</description>
			<product>
				<property>aero/qbar-psf</property>
				<property>metrics/Sw-sqft</property>
				<property>metrics/bw-ft</property>
				<property>fcs/spoiler-pos-deg</property>
				<value> -0.024</value>
			</product>
		</function -->
		<function name="aero/force/Side_rudder">
			<description>Side force due to rudder</description>
			<product>
				<property>aero/qbar-psf</property>
				<property>metrics/Sw-sqft</property>
				<table name="aero/moment/CyRudder">
					<independentVar lookup="column">fcs/rudder-pos-deg</independentVar>
					<independentVar lookup="row">aero/alpha-deg</independentVar>
					<tableData>
							-30			-20			-10			0	10		20		30
						-10	-0.08188	-0.06041	-0.03205	0	0.03205	0.06041	0.08188
						0	-0.06058	-0.04505	-0.02395	0	0.02395	0.04505	0.06058
						16	-0.03255	-0.02396	-0.01267	0	0.01267	0.02396	0.03255
					</tableData>
				</table>
			</product>
		</function>
	</axis>
	<axis name="ROLL">
		<!-- ########################################################### -->
		<function name="aero/moment/Roll_beta">
			<description>Roll_moment_due_to_beta (per radian)</description>
			<product>
				<property>aero/qbar-psf</property>
				<property>metrics/Sw-sqft</property>
				<property>metrics/bw-ft</property>
				<property>aero/beta-rad</property>
				<table name="aero/derivative/Clb">
					<!--<independentVar lookup="row">aero/alpha-deg</independentVar>
					<tableData>
						-10	-0.0410
						-8	-0.0625
						-6	-0.0839
						-4	-0.1053
						-2	-0.1252
						0	-0.1502
						2	-0.1609
						4	-0.1945
						6	-0.2255
						8	-0.2196
						10	-0.2651
						12	-0.2795
						14	-0.3004
						16	-0.3170
					</tableData> -->
					<independentVar lookup="column">velocities/mach</independentVar>
					<independentVar lookup="row">aero/alpha-deg</independentVar>
					<tableData>
							0.1	0.2	0.3	0.4	0.5	0.6
						-10	0.0067	0.0062	0.0061	0.0068	0.0082	0.0110
						-8	-0.0227	-0.0170	-0.0172	-0.0170	-0.0163	-0.0149
						-6	-0.0393	-0.0400	-0.0405	-0.0408	-0.0410	-0.0410
						-4	-0.0618	-0.0626	-0.0635	-0.0645	-0.0657	-0.0673
						-2	-0.0843	-0.0853	-0.0865	-0.0881	-0.0904	-0.0935
						0	-0.1071	-0.1081	-0.1096	-0.1118	-0.1149	-0.1196
						2	-0.1299	-0.1310	-0.1327	-0.1353	-0.1392	-0.1452
						4	-0.1528	-0.1539	-0.1557	-0.1586	-0.1631	-0.1702
						6	-0.1757	-0.1769	-0.1786	-0.1816	-0.1867	-0.1947
						8	-0.1985	-0.1996	-0.2005	-0.2026	-0.2070	-0.2150
						10	-0.2161	-0.2169	-0.2161	-0.2174	-0.2211	-0.2289
						12	-0.2182	-0.2276	-0.2183	-0.2186	-0.2215	-0.2285
						14	-0.2222	-0.2326	-0.2204	-0.2192	-0.2205	-0.2282
						16	-0.2196	-0.2311	-0.2189	-0.2198	-0.2240	-0.2307
						18	-0.2191	-0.2321	-0.2148	-0.2123	-0.2141	-0.2219
						20	-0.2019	-0.2156	-0.1973	-0.1987	-0.2035	-0.2143
						22	-0.1815	-0.1974	-0.1832	-0.1869	-0.1958	-0.2096
						24	-0.1646	-0.1827	-0.1730	-0.1800	-0.1900	-0.2050
					</tableData>
				</table>
			</product>
		</function>
		<function name="aero/moment/Roll_rollrate">
			<description>Roll_moment_due_to_roll_rate</description>
			<product>
				<property>aero/qbar-psf</property>
				<property>metrics/Sw-sqft</property>
				<property>metrics/bw-ft</property>
				<property>aero/bi2vel</property>
				<property>velocities/p-aero-rad_sec</property>
				<table name="aero/derivative/Clp">
					<!--<independentVar lookup="row">aero/alpha-deg</independentVar>
					<tableData>
						-10	-0.4172
						-8	-0.4173
						-6	-0.4173
						-4	-0.4176
						-2	-0.4168
						0	-0.4163
						2	-0.4164
						4	-0.4159
						6	-0.4153
						8	-0.4145
						10	-0.4139
						12	-0.4131
						14	-0.4120
						16	-0.4106
					</tableData> -->
					<independentVar lookup="column">velocities/mach</independentVar>
					<independentVar lookup="row">aero/alpha-deg</independentVar>
					<tableData>
						0.1	0.2	0.3	0.4	0.5	0.6
						-10	-0.4511	-0.4528	-0.4515	-0.4506	-0.4526	-0.4592
						-8	-0.4422	-0.4442	-0.4450	-0.4459	-0.4495	-0.4577
						-6	-0.4331	-0.4355	-0.4383	-0.4411	-0.4465	-0.4565
						-4	-0.4306	-0.4330	-0.4364	-0.4397	-0.4456	-0.4559
						-2	-0.4383	-0.4404	-0.4422	-0.4439	-0.4482	-0.4568
						0	-0.4476	-0.4493	-0.4488	-0.4485	-0.4507	-0.4572
						2	-0.4547	-0.4561	-0.4535	-0.4511	-0.4513	-0.4560
						4	-0.4595	-0.4607	-0.4559	-0.4517	-0.4501	-0.4530
						6	-0.4621	-0.4629	-0.4491	-0.4326	-0.4193	-0.4125
						8	-0.4065	-0.4045	-0.3766	-0.3528	-0.3329	-0.3205
						10	-0.3034	-0.2998	-0.2680	-0.2463	-0.2283	-0.2175
						12	-0.2088	-0.2061	-0.1736	-0.1473	-0.1250	-0.1290
						14	-0.1063	-0.1029	-0.1028	-0.1162	-0.1368	-0.1376
						16	-0.0947	-0.1002	-0.0668	-0.0507	-0.0555	-0.0668
						18	0.0549	0.0526	0.0887	0.0765	0.0587	0.0045
						20	0.1863	0.2083	0.1561	0.0863	0.0045	-0.0598
						22	0.2182	0.1541	0.0666	0.0145	-0.0332	-0.0787
						24	0.1523	0.1095	0.0249	-0.0707	-0.0730	-0.0870
					</tableData>
				</table>
			</product>
		</function>
		<function name="aero/moment/Roll_yawrate">
			<description>Roll_moment_due_to_yaw_rate</description>
			<product>
				<property>aero/qbar-psf</property>
				<property>metrics/Sw-sqft</property>
				<property>metrics/bw-ft</property>
				<property>aero/bi2vel</property>
				<property>velocities/r-aero-rad_sec</property>
				<table name="aero/derivative/Clr">
					<!--<independentVar lookup="row">aero/alpha-deg</independentVar>
					<tableData>
						-10	0.0190
						-8	0.0393
						-6	0.0608
						-4	0.0633
						-2	0.1050
						0	0.1269
						2	0.1482
						4	0.1702
						6	0.1909
						8	0.2138
						10	0.2311
						12	0.2576
						14	0.2765
						16	0.3009
					</tableData> -->
					<independentVar lookup="column">velocities/mach</independentVar>
					<independentVar lookup="row">aero/alpha-deg</independentVar>
					<tableData>
						0.1	0.2	0.3	0.4	0.5	0.6
						-10	-0.0160	-0.0173	-0.0196	-0.0236	-0.0291	-0.0368
						-8	0.0107	0.0100	0.0086	0.0062	0.0028	-0.0018
						-6	0.0375	0.0373	0.0370	0.0362	0.0352	0.0338
						-4	0.0645	0.0649	0.0655	0.0663	0.0676	0.0696
						-2	0.0925	0.0934	0.0948	0.0971	0.1005	0.1055
						0	0.1208	0.1223	0.1244	0.1280	0.1334	0.1414
						2	0.1492	0.1512	0.1539	0.1587	0.1660	0.1768
						4	0.1774	0.1798	0.1831	0.1890	0.1981	0.2116
						6	0.2053	0.2081	0.2127	0.2207	0.2324	0.2492
						8	0.2405	0.2442	0.2496	0.2575	0.2694	0.2871
						10	0.2761	0.2799	0.2838	0.2909	0.3023	0.3199
						12	0.3071	0.3106	0.3131	0.3198	0.3308	0.3446
						14	0.3362	0.3398	0.3319	0.3266	0.3249	0.3413
						16	0.3347	0.3353	0.3409	0.3498	0.3596	0.3710
						18	0.3877	0.3907	0.3872	0.3772	0.3750	0.3757
						20	0.4022	0.4124	0.3815	0.3623	0.3463	0.3483
						22	0.3891	0.3683	0.3337	0.3217	0.3238	0.3372
						24	0.3418	0.3300	0.3046	0.2794	0.3018	0.3298
					</tableData>
				</table>
			</product>
		</function>

		<function name="aero/moment/Roll_aileron">
			<description>Roll_moment_due_to_aileron</description>
			<product>
				<property>aero/qbar-psf</property>
				<property>metrics/Sw-sqft</property>
				<property>metrics/bw-ft</property>
				<table name="aero/coefficient/Cl_Aileron">
					<independentVar>fcs/aileron-pos-deg</independentVar>
					<tableData>
						-25	-0.03389
						-20	-0.03302
						-15	-0.02801
						-10	-0.01909
						-5	-0.00955
						0	0.00000
						5	0.00955
						10	0.01909
						15	0.02801
						20	0.03302
						25	0.03389
					</tableData>
				</table>
			</product>
		</function>
		<!-- fcs/aileron-right-deg, fcs/aileron-left-deg -->
		<!--<function name="aero/moment/Roll_right_aileron">
			<description>Roll_moment_due_to_right_aileron</description>
			<product>
				<property>aero/qbar-psf</property>
				<property>metrics/Sw-sqft</property>
				<property>metrics/bw-ft</property>
				<table name="aero/coefficient/ClRightAileron">
					<independentVar lookup="column">fcs/aileron-right-deg</independentVar>
					<independentVar lookup="row">aero/alpha-deg</independentVar>
					<tableData>
						-25			-20			-10			0		10			20			25
					-10	-0.03044	-0.02539	-0.01342	0.0		0.01322		0.0249		0.0297
					-8	-0.03029	-0.02528	-0.01339	0.0		0.01329		0.02508		0.02998
					-6	-0.03007	-0.02515	-0.01332	0.0		0.01334		0.02524		0.03021
					-4	-0.02983	-0.02495	-0.01325	0.0		0.01337		0.02539		0.03042
					-2	-0.02947	-0.02465	-0.01316	0.0		0.01339		0.02549		0.0306
					0	-0.02904	-0.02436	-0.01306	0.0		0.01338		0.02557		0.03072
					2	-0.02862	-0.02406	-0.01295	0.0		0.01335		0.02559		0.03078
					4	-0.02819	-0.02371	-0.01282	0.0		0.01329		0.02554		0.03077
					6	-0.0277		-0.02336	-0.01267	0.0		0.01322		0.02548		0.03073
					8	-0.02722	-0.02297	-0.01251	0.0		0.01313		0.02537		0.03063
					10	-0.02669	-0.02258	-0.01232	0.0		0.01301		0.0252		0.03046
					12	-0.02614	-0.02213	-0.01214	0.0		0.01287		0.02501		0.03026
					14	-0.02553	-0.02165	-0.01192	0.0		0.01271		0.02477		0.03001
					16	-0.02493	-0.02115	-0.01172	0.0		0.01249		0.02448		0.02971
					</tableData>
				</table>
			</product>
		</function>
		<function name="aero/moment/Roll_left_aileron">
			<description>Roll_moment_due_to_left_aileron</description>
			<product>
				<property>aero/qbar-psf</property>
				<property>metrics/Sw-sqft</property>
				<property>metrics/bw-ft</property>
				<table name="aero/coefficient/ClLeftAileron">
					<independentVar lookup="column">fcs/aileron-left-deg</independentVar>
					<independentVar lookup="row">aero/alpha-deg</independentVar>
					<tableData>
						-25		-20		-10		0		10			20			25
					-10	0.03044	0.02539	0.01342	0.0		-0.01322	-0.0249		-0.0297
					-8	0.03029	0.02528	0.01339	0.0		-0.01329	-0.02508	-0.02998
					-6	0.03007	0.02515	0.01332	0.0		-0.01334	-0.02524	-0.03021
					-4	0.02983	0.02495	0.01325	0.0		-0.01337	-0.02539	-0.03042
					-2	0.02947	0.02465	0.01316	0.0		-0.01339	-0.02549	-0.0306
					0	0.02904	0.02436	0.01306	0.0		-0.01338	-0.02557	-0.03072
					2	0.02862	0.02406	0.01295	0.0		-0.01335	-0.02559	-0.03078
					4	0.02819	0.02371	0.01282	0.0		-0.01329	-0.02554	-0.03077
					6	0.0277	0.02336	0.01267	0.0		-0.01322	-0.02548	-0.03073
					8	0.02722	0.02297	0.01251	0.0		-0.01313	-0.02537	-0.03063
					10	0.02669	0.02258	0.01232	0.0		-0.01301	-0.0252		-0.03046
					12	0.02614	0.02213	0.01214	0.0		-0.01287	-0.02501	-0.03026
					14	0.02553	0.02165	0.01192	0.0		-0.01271	-0.02477	-0.03001
					16	0.02493	0.02115	0.01172	0.0		-0.01249	-0.02448	-0.02971
					</tableData>
				</table>
			</product>
		</function>  -->
		<!--Roll moment  due to spoiler from CP1199 - Roll Moment Coef. Cl at 50º spoiler = -0.042 -->
		<function name="aero/moment/Roll_right_spoiler">
			<description>Roll_moment_due_to_right_spoiler</description>
			<product>
				<property>aero/qbar-psf</property>
				<property>metrics/Sw-sqft</property>
				<property>metrics/bw-ft</property>
				<product name="aero/coefficient/Cl_SpoilerRight">
					<property>fcs/spoiler-right-pos-deg</property>
					<value>0.00084</value>
				</product>
			</product>
		</function>
		<function name="aero/moment/Roll_left_spoiler">
			<description>Roll_moment_due_to_left_spoiler</description>
			<product>
				<property>aero/qbar-psf</property>
				<property>metrics/Sw-sqft</property>
				<property>metrics/bw-ft</property>
				<product name="aero/coefficient/Cl_SpoilerLeft">
					<property>fcs/spoiler-left-pos-deg</property>
					<value>-0.00084</value>
				</product>
			</product>
		</function>
		<function name="aero/moment/Roll_rudder">
			<description>Roll_moment_due_to_rudder</description>
			<product>
				<property>aero/qbar-psf</property>
				<property>metrics/Sw-sqft</property>
				<property>metrics/bw-ft</property>
				<table name="aero/coefficient/Cl_Rudder">
					<independentVar lookup="column">fcs/rudder-pos-deg</independentVar>
					<independentVar lookup="row">aero/alpha-deg</independentVar>
					<tableData>
								-30			-20			-10			0	10		20		30
						-10		-0.0112		-0.00852	-0.0045		0	0.0045	0.00852	0.0112
						0		-0.0075		-0.00557	-0.00308	0	0.00308	0.00557	0.0075
						16		-0.00381	-0.00252	-0.0013		0	0.0013	0.00252	0.00381
					</tableData>
				</table>
			</product>
		</function>
	</axis>

	<axis name="YAW">
		<!-- ########################################################### -->
		<function name="aero/moment/Yaw_sideslip">
			<description>Yaw_moment_due_to_beta</description>
			<product>
				<property>aero/qbar-psf</property>
				<property>metrics/Sw-sqft</property>
				<property>metrics/bw-ft</property>
				<property>aero/beta-rad</property>
				<table name="aero/derivative/CNb">
					<!--<independentVar lookup="row">aero/alpha-deg</independentVar>
					<tableData>
						-10		0.0467
						-5		0.0282
						0		0.0094
						5		0.0034
						10		-0.0066
						15		-0.0234
						20		-0.0307
					</tableData> -->
					<independentVar lookup="column">velocities/mach</independentVar>
					<independentVar lookup="row">aero/alpha-deg</independentVar>
					<tableData>
							0.1	0.2	0.3	0.4	0.5	0.6
						-10	0.0448	0.0390	0.0362	0.0347	0.0342	0.0345
						-8	0.0481	0.0423	0.0394	0.0381	0.0378	0.0383
						-6	0.0497	0.0439	0.0411	0.0398	0.0396	0.0403
						-4	0.0498	0.0440	0.0412	0.0400	0.0398	0.0406
						-2	0.0483	0.0425	0.0397	0.0385	0.0383	0.0391
						0	0.0453	0.0395	0.0367	0.0354	0.0351	0.0358
						2	0.0408	0.0349	0.0321	0.0307	0.0303	0.0308
						4	0.0348	0.0288	0.0259	0.0244	0.0238	0.0240
						6	0.0271	0.0211	0.0181	0.0165	0.0157	0.0156
						8	0.0179	0.0118	0.0089	0.0072	0.0064	0.0060
						10	0.0079	0.0018	-0.0009	-0.0024	-0.0033	-0.0040
						12	-0.0020	-0.0081	-0.0105	-0.0119	-0.0127	-0.0135
						14	-0.0114	-0.0175	-0.0194	-0.0203	-0.0209	-0.0221
						16	-0.0194	-0.0254	-0.0275	-0.0290	-0.0304	-0.0317
						18	-0.0281	-0.0343	-0.0349	-0.0353	-0.0361	-0.0380
						20	-0.0309	-0.0369	-0.0374	-0.0391	-0.0411	-0.0443
						22	-0.0313	-0.0377	-0.0400	-0.0427	-0.0465	-0.0515
						24	-0.0319	-0.0388	-0.0435	-0.0478	-0.0525	-0.0585
					</tableData>
				</table>
			</product>
		</function>
		<function name="aero/moment/Yaw_rollrate">
			<description>Yaw_moment_due_to_roll_rate</description>
			<product>
				<property>aero/qbar-psf</property>
				<property>metrics/Sw-sqft</property>
				<property>metrics/bw-ft</property>
				<property>aero/bi2vel</property>
				<property>velocities/p-aero-rad_sec</property>
				<table name="aero/derivative/CNp">
					<independentVar lookup="row">aero/alpha-deg</independentVar>
					<tableData>
						<!--					-10	0.1562
						-8	0.1209
						-6	0.0849
						-4	0.0500
						-2	0.0138
						0	-0.0220
						2	-0.0568
						4	-0.0921
						6	-0.1265
						8	-0.1613
						10	-0.1952
						12	-0.2301
						14	-0.2639
						16	-0.2972 -->
						-10	0.1170
						-8	0.0864
						-6	0.0564
						-4	0.0274
						-2 -0.0013
						0  -0.0304
						2	-0.0598
						4	-0.0895
						6	-0.1189
						8	-0.1425
						10	-0.1532
						12	-0.1555
						14	-0.1509
						16	-0.1469
						18	-0.1057
						20	-0.0588
						22	-0.0827
						24	-0.0926
					</tableData>
				</table>
			</product>
		</function>
		<function name="aero/moment/Yaw_yawrate">
			<description>Yaw_moment_due_to_yaw_rate</description>
			<product>
				<property>aero/qbar-psf</property>
				<property>metrics/Sw-sqft</property>
				<property>metrics/bw-ft</property>
				<property>aero/bi2vel</property>
				<property>velocities/r-aero-rad_sec</property>
				<table name="aero/derivative/CNr">
					<independentVar lookup="row">aero/alpha-deg</independentVar>
					<tableData>
						<!--   -10	-0.1111
						0	-0.0779
						16	-0.0600 -->
						-10	-0.0795
						-8	-0.0810
						-6	-0.0821
						-4	-0.0828
						-2	-0.0831
						0	-0.0828
						2	-0.0821
						4	-0.0809
						6	-0.0791
						8	-0.0763
						10	-0.0715
						12	-0.0650
						14	-0.0576
						16	-0.0501
					</tableData>
				</table>
			</product>
		</function>
		<function name="aero/moment/Yaw_aileron">
			<description>Yaw_moment_due_to_aileron</description>
			<product>
				<property>aero/qbar-psf</property>
				<property>metrics/Sw-sqft</property>
				<property>metrics/bw-ft</property>
				<table name="aero/coefficient/Cn_Aileron">
					<independentVar lookup="column">fcs/aileron-pos-deg</independentVar>
					<independentVar lookup="row">aero/alpha-deg</independentVar>
					<tableData>
						<!--	-25			-20			-10			0		10			20			25
					-10	0.00622		0.00505		0.00250		0.0	-0.00208	-0.00365	-0.00420
					-8	0.00547		0.00443		0.00217		0.0	-0.00181	-0.00312	-0.00358
					-6	0.00473		0.00383		0.00185		0.0	-0.00153	-0.00256	-0.00292
					-4	0.00406		0.00327		0.00153		0.0	-0.00124	-0.00203	-0.00227
					-2	0.00327		0.00260		0.00122		0.0	-0.00094	-0.00145	-0.00159
					0	0.00255		0.00201		0.00091		0.0	-0.00063	-0.00088	-0.00089
					2	0.00185		0.00144		0.00061		0.0	-0.00032	-0.00028	-0.00017
					4	0.00118		0.00088		0.00032		0.0	0.00000		0.00032		0.00056
					6	0.00052		0.00033		0.00003		0.0	0.00031		0.00092		0.00127
					8	-0.00011	-0.00020	-0.00025	0.0	0.00063		0.00151		0.00201
					10	-0.00075	-0.00074	-0.00052	0.0	0.00095		0.00216		0.00279
					12	-0.00135	-0.00124	-0.00081	0.0	0.00129		0.00280		0.00355
					14	-0.00192	-0.00171	-0.00105	0.0	0.00162		0.00343		0.00430
					16	-0.00242	-0.00214	-0.00126	0.0	0.00194		0.00403		0.00505 -->
							-25			-20			-15			-10			-5			0		5			10			15			20			25
					-10	0.00213		0.00200		0.00170		0.00116		0.00058		0.00000		-0.00058	-0.00116	-0.00170	-0.00200	-0.00213
					-8	0.00135		0.00127		0.00108		0.00073		0.00037		0.00000		-0.00037	-0.00073	-0.00108	-0.00127	-0.00135
					-6	0.00058		0.00054		0.00046		0.00031		0.00016		0.00000		-0.00016	-0.00031	-0.00046	-0.00054	-0.00058
					-4	-0.00018	-0.00017	-0.00015	-0.00010	-0.00005	0.00000		0.00005		0.00010		0.00015		0.00017		0.00018
					-2	-0.00095	-0.00090	-0.00076	-0.00052	-0.00026	0.00000		0.00026		0.00052		0.00076		0.00090		0.00095
					0	-0.00173	-0.00163	-0.00138	-0.00094	-0.00047	0.00000		0.00047		0.00094		0.00138		0.00163		0.00173
					2	-0.00251	-0.00236	-0.00200	-0.00137	-0.00068	0.00000		0.00068		0.00137		0.00200		0.00236		0.00251
					4	-0.00329	-0.00309	-0.00262	-0.00179	-0.00089	0.00000		0.00089		0.00179		0.00262		0.00309		0.00329
					6	-0.00406	-0.00381	-0.00323	-0.00220	-0.00110	0.00000		0.00110		0.00220		0.00323		0.00381		0.00406
					8	-0.00478	-0.00449	-0.00381	-0.00260	-0.00130	0.00000		0.00130		0.00260		0.00381		0.00449		0.00478
					10	-0.00526	-0.00494	-0.00419	-0.00286	-0.00143	0.00000		0.00143		0.00286		0.00419		0.00494		0.00526
					12	-0.00557	-0.00523	-0.00443	-0.00302	-0.00151	0.00000		0.00151		0.00302		0.00443		0.00523		0.00557
					14	-0.00567	-0.00533	-0.00452	-0.00308	-0.00154	0.00000		0.00154		0.00308		0.00452		0.00533		0.00567
					16	-0.00571	-0.00536	-0.00455	-0.00310	-0.00155	0.00000		0.00155		0.00310		0.00455		0.00536		0.00571
					18	-0.00565	-0.00531	-0.00450	-0.00307	-0.00153	0.00000		0.00153		0.00307		0.00450		0.00531		0.00565
					20	-0.00507	-0.00476	-0.00404	-0.00275	-0.00138	0.00000		0.00138		0.00275		0.00404		0.00476		0.00507
					22	-0.00475	-0.00447	-0.00379	-0.00258	-0.00129	0.00000		0.00129		0.00258		0.00379		0.00447		0.00475
					24	-0.00452	-0.00425	-0.00360	-0.00245	-0.00123	0.00000		0.00123		0.00245		0.00360		0.00425		0.00452
					</tableData>
				</table>
			</product>
		</function>
		<!--<function name="aero/moment/Yaw_right_aileron">
			<description>Yaw_moment_due_to_right_aileron</description>
			<product>
				<property>aero/qbar-psf</property>
				<property>metrics/Sw-sqft</property>
				<property>metrics/bw-ft</property>
				<table name="aero/moment/CnRightAileron">
					<independentVar lookup="column">fcs/aileron-right-deg</independentVar>
					<independentVar lookup="row">aero/alpha-deg</independentVar>
					<tableData>
						-25			-20			-10			0		10			20			25
					-10	0.00622		0.00505		0.00250		0.0	-0.00208	-0.00365	-0.00420
					-8	0.00547		0.00443		0.00217		0.0	-0.00181	-0.00312	-0.00358
					-6	0.00473		0.00383		0.00185		0.0	-0.00153	-0.00256	-0.00292
					-4	0.00406		0.00327		0.00153		0.0	-0.00124	-0.00203	-0.00227
					-2	0.00327		0.00260		0.00122		0.0	-0.00094	-0.00145	-0.00159
					0	0.00255		0.00201		0.00091		0.0	-0.00063	-0.00088	-0.00089
					2	0.00185		0.00144		0.00061		0.0	-0.00032	-0.00028	-0.00017
					4	0.00118		0.00088		0.00032		0.0	0.00000		0.00032		0.00056
					6	0.00052		0.00033		0.00003		0.0	0.00031		0.00092		0.00127
					8	-0.00011	-0.00020	-0.00025	0.0	0.00063		0.00151		0.00201
					10	-0.00075	-0.00074	-0.00052	0.0	0.00095		0.00216		0.00279
					12	-0.00135	-0.00124	-0.00081	0.0	0.00129		0.00280		0.00355
					14	-0.00192	-0.00171	-0.00105	0.0	0.00162		0.00343		0.00430
					16	-0.00242	-0.00214	-0.00126	0.0	0.00194		0.00403		0.00505
					</tableData>
				</table>
			</product>
		</function>
		<function name="aero/moment/Yaw_left_aileron">
			<description>Yaw_moment_due_to_left_aileron</description>
			<product>
				<property>aero/qbar-psf</property>
				<property>metrics/Sw-sqft</property>
				<property>metrics/bw-ft</property>
				<table name="aero/moment/CnLeftAileron">
					<independentVar lookup="column">fcs/aileron-left-deg</independentVar>
					<independentVar lookup="row">aero/alpha-deg</independentVar>
					<tableData>
						-25			-20			-10			0	10			20			25
					-10	-0.00622	-0.00505	-0.00250	0.0		0.00208		0.00365		0.00420
					-8	-0.00547	-0.00443	-0.00217	0.0		0.00181		0.00312		0.00358
					-6	-0.00473	-0.00383	-0.00185	0.0		0.00153		0.00256		0.00292
					-4	-0.00406	-0.00327	-0.00153	0.0		0.00124		0.00203		0.00227
					-2	-0.00327	-0.00260	-0.00122	0.0		0.00094		0.00145		0.00159
					0	-0.00255	-0.00201	-0.00091	0.0		0.00063		0.00088		0.00089
					2	-0.00185	-0.00144	-0.00061	0.0		0.00032		0.00028		0.00017
					4	-0.00118	-0.00088	-0.00032	0.0		0.00000		-0.00032	-0.00056
					6	-0.00052	-0.00033	-0.00003	0.0		-0.00031	-0.00092	-0.00127
					8	0.00011		0.00020		0.00025		-0.0	-0.00063	-0.00151	-0.00201
					10	0.00075		0.00074		0.00052		-0.0	-0.00095	-0.00216	-0.00279
					12	0.00135		0.00124		0.00081		-0.		-0.00129	-0.00280	-0.00355
					14	0.00192		0.00171		0.00105		-0.0	-0.00162	-0.00343	-0.00430
					16	0.00242		0.00214		0.00126		-0.0	-0.00194	-0.00403	-0.00505
					</tableData>
				</table>
			</product>
		</function> -->
		<!--Yaw due to spoiler from CP1199
     Cn at 50º spoiler = -0.004 -->
		<function name="aero/moment/Yaw_right_spoiler">
			<description>Yaw_moment_due_to_right_spoiler</description>
			<product>
				<property>aero/qbar-psf</property>
				<property>metrics/Sw-sqft</property>
				<property>metrics/bw-ft</property>
				<product name="aero/coefficient/Cn_SpoilerRight">
					<property>fcs/spoiler-right-pos-deg</property>
					<value>0.00008</value>
				</product>
			</product>
		</function>

		<function name="aero/moment/Yaw_left_spoiler">
			<description>Yaw_moment_due_to_left_spoiler</description>
			<product>
				<property>aero/qbar-psf</property>
				<property>metrics/Sw-sqft</property>
				<property>metrics/bw-ft</property>
				<product name="aero/coefficient/Cn_SpoilerLeft">
					<property>fcs/spoiler-left-pos-deg</property>
					<value>-0.00008</value>
				</product>
			</product>
		</function>
		<function name="aero/moment/Yaw_rudder">
			<description>Yaw_moment_due_to_rudder</description>
			<product>
				<property>aero/qbar-psf</property>
				<property>metrics/Sw-sqft</property>
				<property>metrics/bw-ft</property>
				<table name="aero/coefficient/Cn_Rudder">
					<independentVar lookup="column">fcs/rudder-pos-deg</independentVar>
					<independentVar lookup="row">aero/alpha-deg</independentVar>
					<tableData>
						-30		-20		-10		0	10			20			30
					-10	0.0301	0.02281	0.01201	0	-0.01201	-0.02281	-0.0301
					0	0.02112	0.01542	0.0085	0	-0.0085		-0.01542	-0.02112
					16	0.01132	0.00768	0.004	0	-0.004		-0.00768	-0.01132
					</tableData>
				</table>
			</product>
		</function>
	</axis>
</aerodynamics>
